2017-10-21
16:53
$PROB THEOPHYLLINE ORAL
$INPUT ID AMT=DROP TIME DV BWT
$DATA ../THEO
$PRED
  DOSE = 320
  KA   = THETA(1) * EXP(ETA(1))
  V    = THETA(2) * EXP(ETA(2))
  K    = THETA(3) * EXP(ETA(3))
  F    = DOSE/V*KA/(KA - K)*(EXP(-K*TIME) - EXP(-KA*TIME))
  Y    = F + F*EPS(1) + EPS(2)

$THETA (0, 2) (0, 50) (0, 0.1)
$OMEGA BLOCK(3)
  0.2
  0.1  0.2
  0.1  0.1  0.2
$SIGMA 0.1  0.1
$EST MAX=9999 METHOD=COND INTER LAPL
$COV PRINT=ERS
$TAB ID ETA(1) ETA(2) ETA(3)
     FILE=EBE.txt NOAPPEND FIRSTONLY
$TAB ID TIME DV PRED RES WRES CIPREDI CIRESI CWRES G11 G21 G31 H11 H21
     FILE=sdtab.txt NOPRINT NOAPPEND ONEHEADER

NM-TRAN MESSAGES
 WARNINGS AND ERRORS (IF ANY) FOR PROBLEM    1
 (WARNING  2) NM-TRAN INFERS THAT THE DATA ARE POPULATION.
 (WARNING  87) WITH "LAPLACIAN" AND "INTERACTION", "NUMERICAL" AND "SLOW"
 ARE ALSO REQUIRED ON $ESTIM RECORD, AND "SLOW" IS REQUIRED ON $COV
 RECORD. NM-TRAN HAS SUPPLIED THESE OPTIONS.
 (WARNING  13) WITH USER-WRITTEN PRED OR $PRED, NM-TRAN CANNOT APPEND THE
 MDV DATA ITEM.

1NONLINEAR MIXED EFFECTS MODEL PROGRAM (NONMEM) VERSION 7.4.1
 ORIGINALLY DEVELOPED BY STUART BEAL, LEWIS SHEINER, AND ALISON BOECKMANN
 CURRENT DEVELOPERS ARE ROBERT BAUER, ICON DEVELOPMENT SOLUTIONS,
 AND ALISON BOECKMANN. IMPLEMENTATION, EFFICIENCY, AND STANDARDIZATION
 PERFORMED BY NOUS INFOSYSTEMS.
 PROBLEM NO.:         1
 THEOPHYLLINE ORAL
 TOT. NO. OF OBS RECS:      132
 TOT. NO. OF INDIVIDUALS:       12
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 #TBLN:      1
 #METH: Laplacian Conditional Estimation with Interaction
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
 #TERM:
0MINIMIZATION SUCCESSFUL
 NO. OF FUNCTION EVALUATIONS USED:      386
 NO. OF SIG. DIGITS IN FINAL EST.:  3.4

 ETABAR IS THE ARITHMETIC MEAN OF THE ETA-ESTIMATES,
 AND THE P-VALUE IS GIVEN FOR THE NULL HYPOTHESIS THAT THE TRUE MEAN IS 0.

 ETABAR:        -2.6231E-02 -1.3601E-04  5.0887E-03
 SE:             1.8001E-01  3.7369E-02  3.7639E-02
 N:                      12          12          12

 P VAL.:         8.8414E-01  9.9710E-01  8.9246E-01

 ETASHRINKSD(%)  1.5137E+00  1.0879E+00  3.2920E+00
 ETASHRINKVR(%)  3.0044E+00  2.1639E+00  6.4756E+00
 EBVSHRINKSD(%)  3.1146E+00  4.7110E+00  7.3754E+00
 EBVSHRINKVR(%)  6.1321E+00  9.2000E+00  1.4207E+01
 EPSSHRINKSD(%)  7.9965E+00  8.7624E+00
 EPSSHRINKVR(%)  1.5354E+01  1.6757E+01


 TOTAL DATA POINTS NORMALLY DISTRIBUTED (N):          132
 N*LOG(2PI) CONSTANT TO OBJECTIVE FUNCTION:    242.59977276603360
 OBJECTIVE FUNCTION VALUE WITHOUT CONSTANT:    93.558703845501213
 OBJECTIVE FUNCTION VALUE WITH CONSTANT:       336.15847661153481
 REPORTED OBJECTIVE FUNCTION DOES NOT CONTAIN CONSTANT

 TOTAL EFFECTIVE ETAS (NIND*NETA):                            36


 #TERE:
 Elapsed estimation  time in seconds:     0.84
 Elapsed covariance  time in seconds:     0.55
 Elapsed postprocess time in seconds:     0.02

 ********************                LAPLACIAN CONDITIONAL ESTIMATION WITH INTERACTION               ********************
 #OBJT:**************                       MINIMUM VALUE OF OBJECTIVE FUNCTION                      ********************
 #OBJV:********************************************       93.559       **************************************************

 ********************                LAPLACIAN CONDITIONAL ESTIMATION WITH INTERACTION               ********************
 ********************                             FINAL PARAMETER ESTIMATE                           ********************

 THETA - VECTOR OF FIXED EFFECTS PARAMETERS   *********
         TH 1      TH 2      TH 3
         1.51E+00  3.23E+01  8.73E-02

 OMEGA - COV MATRIX FOR RANDOM EFFECTS - ETAS  ********
         ETA1      ETA2      ETA3
 ETA1
+        4.37E-01
 ETA2
+        5.63E-02  1.87E-02
 ETA3
+       -4.68E-03  1.26E-02  1.98E-02

 SIGMA - COV MATRIX FOR RANDOM EFFECTS - EPSILONS  ****
         EPS1      EPS2
 EPS1
+        1.77E-02
 EPS2
+        0.00E+00  7.56E-02

 OMEGA - CORR MATRIX FOR RANDOM EFFECTS - ETAS  *******
         ETA1      ETA2      ETA3
 ETA1
+        6.61E-01
 ETA2
+        6.23E-01  1.37E-01
 ETA3
+       -5.03E-02  6.57E-01  1.41E-01

 SIGMA - CORR MATRIX FOR RANDOM EFFECTS - EPSILONS  ***
         EPS1      EPS2
 EPS1
+        1.33E-01
 EPS2
+        0.00E+00  2.75E-01

 ********************                LAPLACIAN CONDITIONAL ESTIMATION WITH INTERACTION               ********************
 ********************                            STANDARD ERROR OF ESTIMATE                          ********************

 THETA - VECTOR OF FIXED EFFECTS PARAMETERS   *********
         TH 1      TH 2      TH 3
         2.92E-01  1.57E+00  3.98E-03

 OMEGA - COV MATRIX FOR RANDOM EFFECTS - ETAS  ********
         ETA1      ETA2      ETA3
 ETA1
+        2.19E-01
 ETA2
+        3.58E-02  9.34E-03
 ETA3
+        2.14E-02  9.08E-03  1.79E-02

 SIGMA - COV MATRIX FOR RANDOM EFFECTS - EPSILONS  ****
         EPS1      EPS2
 EPS1
+        8.72E-03
 EPS2
+       .........  7.08E-02

 OMEGA - CORR MATRIX FOR RANDOM EFFECTS - ETAS  *******
         ETA1      ETA2      ETA3
 ETA1
+        1.66E-01
 ETA2
+        2.58E-01  3.41E-02
 ETA3
+        2.26E-01  3.84E-01  6.35E-02

 SIGMA - CORR MATRIX FOR RANDOM EFFECTS - EPSILONS  ***
         EPS1      EPS2
 EPS1
+        3.27E-02
 EPS2
+       .........  1.29E-01

 ********************                LAPLACIAN CONDITIONAL ESTIMATION WITH INTERACTION               ********************
 ********************                          COVARIANCE MATRIX OF ESTIMATE                         ********************

            TH 1      TH 2      TH 3      OM11      OM12      OM13      OM22      OM23      OM33      SG11      SG12      SG22
 TH 1
+        8.52E-02
 TH 2
+        2.26E-01  2.46E+00
 TH 3
+       -2.31E-04  8.75E-04  1.58E-05
 OM11
+        3.91E-02  1.04E-01  1.30E-04  4.80E-02
 OM12
+        5.29E-03 -7.13E-03  2.08E-05  6.48E-03  1.28E-03
 OM13
+        4.43E-04  2.01E-03 -2.42E-05 -1.26E-03 -6.88E-05  4.59E-04
 OM22
+       -4.17E-04  5.12E-04  1.97E-05  6.42E-04  1.42E-04 -1.53E-05  8.71E-05
 OM23
+        2.52E-04  6.87E-04 -3.03E-05 -5.49E-04 -1.22E-04  8.40E-05 -4.77E-05  8.25E-05
 OM33
+        7.12E-04 -6.48E-03 -5.52E-05 -7.17E-04 -1.13E-04 -2.41E-05 -9.89E-05  1.28E-04  3.20E-04
 SG11
+       -5.63E-04  4.89E-04  1.97E-05 -4.25E-04 -5.89E-05  1.35E-05  1.86E-05 -4.22E-05 -1.05E-04  7.60E-05
 SG12
+       ......... ......... ......... ......... ......... ......... ......... ......... ......... ......... .........
 SG22
+        2.30E-03 -3.15E-02 -2.17E-04 -2.24E-03 -2.90E-04 -1.55E-04 -3.98E-04  4.70E-04  1.24E-03 -4.75E-04 .........  5.02E-03

 ********************                LAPLACIAN CONDITIONAL ESTIMATION WITH INTERACTION               ********************
 ********************                          CORRELATION MATRIX OF ESTIMATE                        ********************

            TH 1      TH 2      TH 3      OM11      OM12      OM13      OM22      OM23      OM33      SG11      SG12      SG22
 TH 1
+        2.92E-01
 TH 2
+        4.94E-01  1.57E+00
 TH 3
+       -1.99E-01  1.40E-01  3.98E-03
 OM11
+        6.12E-01  3.01E-01  1.50E-01  2.19E-01
 OM12
+        5.06E-01 -1.27E-01  1.46E-01  8.25E-01  3.58E-02
 OM13
+        7.09E-02  5.98E-02 -2.84E-01 -2.69E-01 -8.97E-02  2.14E-02
 OM22
+       -1.53E-01  3.50E-02  5.32E-01  3.14E-01  4.25E-01 -7.67E-02  9.34E-03
 OM23
+        9.52E-02  4.82E-02 -8.38E-01 -2.76E-01 -3.75E-01  4.32E-01 -5.63E-01  9.08E-03
 OM33
+        1.36E-01 -2.31E-01 -7.76E-01 -1.83E-01 -1.76E-01 -6.28E-02 -5.92E-01  7.85E-01  1.79E-02
 SG11
+       -2.21E-01  3.58E-02  5.68E-01 -2.22E-01 -1.88E-01  7.24E-02  2.28E-01 -5.34E-01 -6.71E-01  8.72E-03
 SG12
+       ......... ......... ......... ......... ......... ......... ......... ......... ......... ......... .........
 SG22
+        1.11E-01 -2.83E-01 -7.71E-01 -1.45E-01 -1.14E-01 -1.02E-01 -6.02E-01  7.30E-01  9.77E-01 -7.70E-01 .........  7.08E-02
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
 ********************                LAPLACIAN CONDITIONAL ESTIMATION WITH INTERACTION               ********************
 ********************                      EIGENVALUES OF COR MATRIX OF ESTIMATE                     ********************

             1         2         3         4         5         6         7         8         9        10        11
         2.02E-04  2.86E-03  2.65E-02  1.49E-01  2.14E-01  2.75E-01  6.49E-01  1.05E+00  1.54E+00  2.54E+00  4.55E+00
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 Elapsed finaloutput time in seconds:     0.05
 #CPUT: Total CPU Time in Seconds,        1.406
